x := -0.8
y := 0.6
acos(0.8)*180/π → 36.8698976458
atan(y/x)*180/π → -36.8698976458
acos(-0.8)*180/π → 143.130102354
angle(x, y) :=
    if x == 0 and y > 0
        0
    else if x == 0 and y < 0
        π
    else if y == 0 and x > 0
        π/2
    else if y == 0 and x < 0
        π + π/2
    else if x > 0
        π/2 - atan(y/x)
    else
        π + π/2 - atan(y/x)
# По сути, это кастомный atan2
angle2(x, y) :=
    if (π/2 - atan2(x, y)) < 0
        2*π + π/2 - atan2(x, y)
    else
        π/2 - atan2(x, y)
atan2(x, y)*180/π → 143.130102354
angle2(x, y)*180/π → 306.869897646
(π/2 + atan2(x, y))*180/π → 233.130102354
angle(x, y)*180/π float → 306.869897646
