B := [0; 0; -1]
incl := 0.33772
α := 0.57560734641
β := 4.0237600
γ := 1.11115265359
M_rot_x := [1, 0, 0; 0, cos(α), -sin(α); 0, sin(α), cos(α)]
M_rot_y := [cos(β), 0, sin(β); 0, 1, 0; -sin(β), 0, cos(β)]
M_rot_z := [cos(γ), -sin(γ), 0; sin(γ), cos(γ), 0; 0, 0, 1]
M_rot_x_incl := [1, 0, 0; 0, cos(incl), -sin(incl); 0, sin(incl), cos(incl)]
B' := M_rot_y*M_rot_x_incl*M_rot_z*M_rot_x*B → [0.859350318017; 0.505791620059; 0.0754444696568]
B'_proj := [B'[0]; 0; B'[2]]
B'*B'_proj/(|B'|*|B'_proj|) → 0.862655688602
acos(B'*B'_proj/(|B'|*|B'_proj|))*180/π float → 30.383915976
acos(B'_proj[0]/|B'_proj|)*180/π → 5.01727299974
